units real
atom_style full
boundary p p p
pair_style lj/class2/coul/long 12.0 12.0
special_bonds  lj 0 0 1 coul 0 0 1
bond_style class2
angle_style class2
dihedral_style class2
improper_style class2
dielectric 1.0
kspace_style ewald 0.001
read_data lammps.data
pair_modify  mix sixthpower
#element_type O H H H C N C

reset_timestep 0
min_style cg
minimize 1e-6 1e-6 2000 20000

# ---------------- Initial Equilibration ----------------
timestep 1.0

velocity all create 300.0 12345 dist gaussian mom yes rot yes

fix EQ all npt temp 300.0 300.0 100.0 iso 1.0 1.0 1000.0

thermo_style custom step temp press enthalpy vol
thermo 1000

run 100000
unfix EQ

# =====================================================
# OUTPUT HEADER (unchanged)
# =====================================================
shell echo "# T(K)    Enthalpy(kcal/mol)    Volume(A^3)" > H_T.dat

# =====================================================
# -------- Stage 1: Coarse Scan (20 K step) ----------
# =====================================================

variable T equal 300
variable T_end equal 900
variable dT equal 20

label coarse_loop
if "${T} > ${T_end}" then "jump SELF coarse_done"

reset_timestep 0
velocity all create ${T} 45678 dist gaussian mom yes rot yes

fix NPT all npt temp ${T} ${T} 100.0 iso 1.0 1.0 1000.0

run 100000      # 100 ps per temperature

variable H equal enthalpy
variable V equal vol
print "${T} ${H} ${V}" append H_T.dat

unfix NPT

variable T equal ${T}+${dT}
jump SELF coarse_loop

label coarse_done

# =====================================================
# -------- Stage 2: Fine Scan (auto range 450-650 K) --
# =====================================================

variable T equal 450
variable T_end equal 650
variable dT equal 5

label fine_loop
if "${T} > ${T_end}" then "jump SELF end_all"

reset_timestep 0
velocity all create ${T} 78901 dist gaussian mom yes rot yes

fix NPT all npt temp ${T} ${T} 100.0 iso 1.0 1.0 1000.0

run 150000      # 150 ps per temperature

variable H equal enthalpy
variable V equal vol
print "${T} ${H} ${V}" append H_T.dat

unfix NPT

variable T equal ${T}+${dT}
jump SELF fine_loop

label end_all

write_dump all xyz final_fast.xyz

print "FAST melting scan finished."
